*Heading
** Job name: tension_elastic_job Model name: tension_elastic
** Generated by: Abaqus/CAE 2021.HF9
*Preprint, echo=NO, model=NO, history=NO, contact=NO
**
** PARTS
**
*Part, name=plate
*Node
      1,           0.,       -1500.
      2,   66.6666641,       -1500.
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*Element, type=CPE4
   1,    1,    2,   48,   47
   2,    2,    3,   49,   48
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*Nset, nset=All, generate
    1,  2760,     1
*Elset, elset=All, generate
    1,  2655,     1
*Nset, nset=bottom, generate
  1,  46,   1
*Elset, elset=bottom, generate
  1,  45,   1
*Nset, nset=top, generate
 2715,  2760,     1
*Elset, elset=top, generate
 2611,  2655,     1
*Nset, nset=right, generate
   46,  2760,    46
*Elset, elset=right, generate
   45,  2655,    45
*Orientation, name=Ori-1
1., 0., 0., 0., 1., 0.
1, 0.
** Section: solid
*Solid Section, elset=All, orientation=Ori-1, material=elas
1000.,
*End Part
**
**
** ASSEMBLY
**
*Assembly, name=Assembly
**
*Instance, name=plate_1, part=plate
*End Instance
**
*Node
      1,        1500.,        1500.,           0.
*Nset, nset=bdisp
 1,
** Constraint: ce_bot
*Equation
2
plate_1.top, 2, 1.
bdisp, 2, -1.
*End Assembly
**
** MATERIALS
**
*Material, name=elas
*Elastic
210000., 0.3
** ----------------------------------------------------------------
**
** STEP: Static
**
*Step, name=Static, nlgeom=YES, inc=10000
*Static
0.01, 0.8, 1e-09, 0.01
**
** BOUNDARY CONDITIONS
**
** Name: bot Type: Displacement/Rotation
*Boundary
plate_1.bottom, 2, 2, -1.
** Name: side Type: Displacement/Rotation
*Boundary
plate_1.right, 1, 1
** Name: top Type: Displacement/Rotation
*Boundary
bdisp, 2, 2, 1.
**
** CONTROLS
**
*Controls, reset
*Controls, analysis=discontinuous
*Controls, parameters=time incrementation
, , , , , , , 20, , ,
**
** OUTPUT REQUESTS
**
*Restart, write, frequency=0
**
** FIELD OUTPUT: F-Output-1
**
*Output, field
*Node Output
RF, U
*Element Output, position=AVERAGED AT NODES, directions=YES
E, LE, NE, S
**
** HISTORY OUTPUT: H-Output-2
**
*Output, history
*Node Output, nset=bdisp
RF2, U2
**
** HISTORY OUTPUT: H-Output-1
**
*Output, history, variable=PRESELECT
*End Step
