*Heading
     Model mode I crack propagation with XFEM
** Generated by: Abaqus/CAE Version 6.9-DEV
*Preprint, echo=NO, model=yes, history=yes, contact=NO
**
*Node
      1,           3.,  0.300000012
      2,  0.300000012,  0.299999952
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*Element, type=CPE4
  1,   1,  13, 249, 106
  2,  13,  14, 250, 249
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*Nset, nset=_PickedSet11, generate
    1,  1232,     1
*Elset, elset=_PickedSet11, generate
    1,  1161,     1
*Elset, elset=one
    196
*enrichment,elset=_PickedSet11,interaction=lower,type=propagation crack, name=abc
** Section: Section-1
*Solid Section, elset=_PickedSet11, material=Material-1
1.0
**
*Nset, nset=_PickedSet4
 1, 4
*Nset, nset=_PickedSet5
   6,   7,   9, 117, 118, 145
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*Elset, elset=_PickedSet5
 385, 386, 387, 735, 736, 737
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*Nset, nset=_PickedSet6
  10,  11,  12, 192, 193, 194
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*Elset, elset=_PickedSet6
 1095, 1096, 1097, 1098, 1099, 1100
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**
** MATERIALS
**
*Material, name=Material-1
*Elastic
 2.1e+11, 0.3
*DAMAGE INITIATION,CRITERION=MAXPS
8.44E7
**DAMAGE EVOLUTION,TYPE=ENERGY,MIXED MODE BEHAVIOR=POWER LAW,POWER=1.0
**4.22d4,4.22d4
**DAMAGE STABILIZATION
** 1.e-5
*surface interaction,name=lower
*surface behavior
*FRACTURE CRITERION,TYPE=VCCT,MIXED MODE BEHAVIOR=POWER,VISCOSITY=1.0E-5
4.22d4,4.22d4,4.22d4,1.0,1.0,1.0
**surface behavior, pressure-overclosure=linear
**6.42E13
**
*initial condition,type=enrichment
400,1,abc, 1.0, 0.0
400,2,abc, 1.0,-1.0
400,3,abc,-1.0,-1.0
400,4,abc,-1.0, 0.0
401,1,abc, 1.0,-1.0
401,2,abc, 1.0,-2.0
401,3,abc,-1.0,-2.0
401,4,abc,-1.0,-1.0
402,1,abc, 1.0,-2.0
402,2,abc, 1.0,-3.0
402,3,abc,-1.0,-3.0
402,4,abc,-1.0,-2.0
**
*nset,nset=disp
 9999
*equation
 2,
_PickedSet5,2,1,9999,2,-1
**
** BOUNDARY CONDITIONS
**
** Name: BC-1 Type: Displacement/Rotation
*Boundary
_PickedSet4, 1, 1
*amplitude,name=amp1
0,0,1,1
** ----------------------------------------------------------------
**
** STEP: Step-1
**
*Step, name=Step-1, nlgeom=YES, inc=10000
*Static
0.01, 0.66, 1e-09, 0.01
**
*CONTROLS,PARAMETERS=TIME INCREMENTATION
 , , , , , , ,20
** BOUNDARY CONDITIONS
**
** Name: BC-2 Type: Displacement/Rotation
*Boundary,amp=amp1
9999, 2, 2, 0.001
**_PickedSet5, 2, 2, 0.001
** Name: BC-3 Type: Displacement/Rotation
*Boundary,amp=amp1
_PickedSet6, 2, 2, -0.001
**
**
** FIELD OUTPUT: F-Output-1
**
*Output, field
*element output
S
*node output
U,PHILSM
*output,history
*node output,nset=disp
rf2,u2
*element output,elset=one
S,
*End Step
