*Heading
** Job name: crackprop_model_xfem_cpe4 Model name: crackprop_model_xfem_cpe4
** Generated by: Abaqus/CAE 2021.HF9
*Preprint, echo=NO, model=NO, history=NO, contact=NO
**
** PARTS
**
*Part, name=PART-1
*Node
      1,           3.,  0.300000012
      2,  0.300000012,  0.299999952
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*Element, type=CPE4
   1,    1,   13,  249,  106
   2,   13,   14,  250,  249
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*Elset, elset=_PICKEDSET11, internal, generate
    1,  1161,     1
** Section: Section-1-_PICKEDSET11
*Solid Section, elset=_PICKEDSET11, material=MATERIAL-1
1.,
*End Part
**
**
** ASSEMBLY
**
*Assembly, name=Assembly
**
*Instance, name=PART-1-1, part=PART-1
*End Instance
**
*Nset, nset=DISP, instance=PART-1-1
 9999,
*Nset, nset=EqnSet-1, instance=PART-1-1
 9999,
*Elset, elset=ONE, instance=PART-1-1
 196,
*Nset, nset=_M12, internal, instance=PART-1-1
 9999,
*Nset, nset=_PICKEDSET4, internal, instance=PART-1-1
 1, 4
*Nset, nset=_PICKEDSET5, internal, instance=PART-1-1
   6,   7,   9, 117, 118, 145
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*Elset, elset=_PICKEDSET5, internal, instance=PART-1-1
 385, 386, 387, 735, 736, 737
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*Nset, nset=_PICKEDSET6, internal, instance=PART-1-1
  10,  11,  12, 192, 193, 194
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*Elset, elset=_PICKEDSET6, internal, instance=PART-1-1
 1095, 1096, 1097, 1098, 1099, 1100
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*Nset, nset=_PICKEDSET11, internal, instance=PART-1-1, generate
    1,  1232,     1
** Constraint: Eqn-1
*Equation
2
_PICKEDSET5, 2, 1.
EqnSet-1, 2, -1.
*Enrichment, name=ABC, type=PROPAGATION CRACK, elset=PART-1-1._PICKEDSET11, interaction=LOWER
*End Assembly
*Amplitude, name=RAMP1
             0.,              0.,              1.,              1.
**
** MATERIALS
**
*Material, name=MATERIAL-1
*Damage Initiation, criterion=MAXPS
 2.2e+08,
*Damage Evolution, type=ENERGY, mixed mode behavior=POWER LAW, power=1.
42200.,42200.,    0.
*Damage Stabilization
1e-05
*Elastic
 2.1e+11, 0.3
**
** INTERACTION PROPERTIES
**
*Surface Interaction, name=LOWER
0.02,
*Initial Conditions, type=ENRICHMENT
PART-1-1.400, 1, ABC, 1., 0.
PART-1-1.400, 2, ABC, 1., -1.
PART-1-1.400, 3, ABC, -1., -1.
PART-1-1.400, 4, ABC, -1., 0.
PART-1-1.401, 1, ABC, 1., -1.
PART-1-1.401, 2, ABC, 1., -2.
PART-1-1.401, 3, ABC, -1., -2.
PART-1-1.401, 4, ABC, -1., -1.
PART-1-1.402, 1, ABC, 1., -2.
PART-1-1.402, 2, ABC, 1., -3.
PART-1-1.402, 3, ABC, -1., -3.
PART-1-1.402, 4, ABC, -1., -2.
**
** BOUNDARY CONDITIONS
**
** Name: Disp-BC-1 Type: Displacement/Rotation
*Boundary
_PICKEDSET4, 1, 1
** ----------------------------------------------------------------
**
** STEP: Step-1
**
*Step, name=Step-1, nlgeom=YES, inc=10000
*Static
0.01, 0.8, 1e-09, 0.01
**
** BOUNDARY CONDITIONS
**
** Name: Disp-BC-2 Type: Displacement/Rotation
*Boundary, amplitude=RAMP1
_PICKEDSET6, 2, 2, -0.001
** Name: Disp-BC-3 Type: Displacement/Rotation
*Boundary, amplitude=RAMP1
_M12, 2, 2, 0.001
**
** CONTROLS
**
*Controls, reset
*Controls, parameters=time incrementation
, , , , , , , 20, , ,
**
** OUTPUT REQUESTS
**
*Restart, write, frequency=0
**
** FIELD OUTPUT: F-Output-2
**
*Output, field
*Node Output
PHILSM, U
**
** FIELD OUTPUT: F-Output-1
**
*Element Output, directions=YES
S,
**
** HISTORY OUTPUT: H-Output-1
**
*Output, history
*Node Output, nset=DISP
RF2, U2
*End Step
