*Heading
     Model II crack propagation with XFEM with full integrate stations
*** Job name: shear_reg Model name: Model-1
** Generated by: Abaqus/CAE Version 6.9-DEV
*Preprint, echo=NO, model=yes, history=yes
**
*Node
      1,           0.,          -3.
      2,  0.100000001,          -3.
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*Element, type=CPE4
   1,    1,    2,   33,   32
   2,    2,    3,   34,   33
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*Nset, nset=_PickedSet2, generate
    1,  1891,     1
*Elset, elset=_PickedSet2, generate
    1,  1800,     1
*enrichment,elset=_PickedSet2,interaction=lower,type=propagation crack, name=abc
** Section: Section-1
*Solid Section, elset=_PickedSet2, material=Material-1
1.0
**
*Nset, nset=_PickedSet4, generate
 1861,  1891,     1
*Elset, elset=_PickedSet4, generate
 1771,  1800,     1
*Nset, nset=_PickedSet5, generate
  1,  31,   1
*Elset, elset=_PickedSet5, generate
  1,  30,   1
**
** MATERIALS
**
*Material, name=Material-1
*Elastic
 2.1e+11, 0.3
*DAMAGE INITIATION,CRITERION=MAXPS
8.44E7
***DAMAGE EVOLUTION,TYPE=ENERGY,MIXED MODE BEHAVIOR=POWER LAW,POWER=1.0
**4.22d4,4.22d4
**DAMAGE STABILIZATION
** 1.e-4
*surface interaction,name=lower
*surface behavior
*FRACTURE CRITERION,TYPE=VCCT,MIXED MODE BEHAVIOR=POWER,VISCOSITY=5.e-5
4.22d4,4.22d4,4.22d4,1.0,1.0,1.0
***surface behavior, pressure-overclosure=linear
**6.42E13
**
*initial condition,type=enrichment
901,1,abc,-1.0,-1.5
901,2,abc,-1.0,-1.4
901,3,abc, 1.0,-1.4
901,4,abc, 1.0,-1.5
902,1,abc,-1.0,-1.4
902,2,abc,-1.0,-1.2
902,3,abc, 1.0,-1.2
902,4,abc, 1.0,-1.4
903,1,abc,-1.0,-1.3
903,2,abc,-1.0,-1.2
903,3,abc, 1.0,-1.2
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915,4,abc, 1.0,-0.1
** ----------------------------------------------------------------
*nset,nset=disp
 9999
*equation
 2,
_PickedSet5,1,1,9999,1,-1
**
*Boundary
_PickedSet4, 2, 2, 0.00
_PickedSet5, 2, 2, 0.00
**
**
*amplitude,name=ramp
0.0,0.0,1.0,1.0
** STEP: Step-1
**
*Step, name=Step-1, nlgeom=YES, inc=10000
*Static
0.01, 0.55, 1e-12, 0.05
**
*CONTROLS,PARAMETERS=TIME INCREMENTATION
 , , , , , , ,20
**
** BOUNDARY CONDITIONS
**
** Name: BC-1 Type: Displacement/Rotation
*Boundary,amplitude=ramp
_PickedSet4, 1, 1, -0.01
disp, 1, 1, 0.01
**
** OUTPUT REQUESTS
**
** FIELD OUTPUT: F-Output-1
**
*Output, field, freq=60
*element output
STATUSXFEM,ENRRTXFEM
*node output
U
PHILSM
**
** HISTORY OUTPUT: H-Output-1
**
*Output, history
*node output,nset=disp
rf1,u1
*End Step
